JAGER Geometry V_control (generated by MATLAB)
0.0000
0 0 0.0
6.6400 1.0520 6.3100
3.2583 0.0000 -0.1450
0.028130

SURFACE
Wing
10 1.0 24 1.0
YDUPLICATE
0.0

SECTION
2.9167 0.0000 0.0000 1.0520 0.0000
NACA
4412

SECTION
2.9167 1.5775 0.0000 1.0520 0.0000
NACA
4412

CONTROL
aileron 1.000 0.800 0 0 0 -1.0

SECTION
2.9167 3.1550 0.0000 1.0520 0.0000
NACA
4412

CONTROL
aileron 1.000 0.800 0 0 0 -1.0

SURFACE
Vtail_R
8 1.0 16 1.0

SECTION
6.5050 0.0000 0.0000 0.7679 0.0000
NACA
0010

SECTION
6.8685 0.3635 0.2678 0.6297 0.0000
NACA
0010

CONTROL
pitchv 1.000 0.700 0 0 0 1.0
CONTROL
yawv 1.000 0.700 0 0 0 1.0

SECTION
7.7167 1.2117 0.8927 0.3072 0.0000
NACA
0010

CONTROL
pitchv 1.000 0.700 0 0 0 1.0
CONTROL
yawv 1.000 0.700 0 0 0 1.0

SURFACE
Vtail_L
8 1.0 16 1.0

SECTION
6.5050 -0.0000 0.0000 0.7679 0.0000
NACA
0010

SECTION
6.8685 -0.3635 0.2678 0.6297 0.0000
NACA
0010

CONTROL
pitchv -1.000 0.700 0 0 0 1.0
CONTROL
yawv 1.000 0.700 0 0 0 1.0

SECTION
7.7167 -1.2117 0.8927 0.3072 0.0000
NACA
0010

CONTROL
pitchv -1.000 0.700 0 0 0 1.0
CONTROL
yawv 1.000 0.700 0 0 0 1.0
